# Worksheet setting: ORIGIN = 1
# обоснование типа производства и вида поточной линии
r := 0.48
n_wdays := 22
n_wshift := 2
work_t := 8
repair_loss := 0.97
m := 9
t := [1.92; 1.40; 0.48; 0.48; 0.56; 1.48; 0.48; 1.44; 0.40]
ratio := t/r = [4; 2.91667; 1; 1; 1.16667; 3.08333; 1; 3; 0.833333]
N := n_wdays*n_wshift*work_t*60*repair_loss/r = 42680
C_p := sum(t[i], i = 1 .. m)/r = 18
K_sp := m/C_p = 0.5
K_m := sum(t[i], i = 1 .. m)/(m*r) = 2
# проверка кратности норм времени такту с допустимым отклонением(5-7%) ?
r*0.05 = 0.024
r*0.07 = 0.0336
ratio[5]/1.1 = 1.06061
# рассчёт календарно-плановых нормативов и построение стандарт-плана
solve block
    # guess values
    k := 1.0
    # constraints
    ratio[2]/k == 3
    # solver
    find(k) = 0.972222
end solve block
solve block
    # guess values
    k := 1.0
    # constraints
    ratio[5]/k == 1
    # solver
    find(k) = 1.16667
end solve block
solve block
    # guess values
    k := 1.0
    # constraints
    ratio[6]/k == 3
    # solver
    find(k) = 1.02778
end solve block
solve block
    # guess values
    k := 1.0
    # constraints
    ratio[9]/k == 1
    # solver
    find(k) = 0.833333
end solve block
